*Heading
** Job name: PlainStrainM Model name: Model-1
** Generated by: Abaqus/CAE 6.14-1
*Preprint, echo=NO, model=NO, history=NO, contact=NO
*diagnostics, nonhybrid=warning
**
** PARTS
**
*Part, name=Part-1
*Node
      1,           0.,          0.5
      2,          16.,          0.5
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*Element, type=CPE4
1,  1, 11, 24,  4
2, 11, 12, 23, 24
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*Nset, nset=Set-4, generate
  1,  45,   1
*Elset, elset=Set-4, generate
  1,  32,   1
** Section: Section-1
*Solid Section, elset=Set-4, material=Material-1
1.,
*End Part
**
**
** ASSEMBLY
**
*Assembly, name=Assembly
**
*Instance, name=Part-1-1, part=Part-1
*End Instance
**
*Nset, nset=Set-1, instance=Part-1-1
  8,  9, 10, 39, 40, 41, 42, 43, 44, 45
*Elset, elset=Set-1, instance=Part-1-1, generate
 25,  32,   1
*Nset, nset=Set-2, instance=Part-1-1
 9,
*Nset, nset=Set-3, instance=Part-1-1
 10,
*Nset, nset=Set-4, instance=Part-1-1
 2,
*Nset, nset=Set-5, instance=Part-1-1
 3,
*Nset, nset=Set-6, instance=Part-1-1
 6,
*Nset, nset=Set-7, instance=Part-1-1
 7,
*Nset, nset=Set-8, instance=Part-1-1
 9,
*Nset, nset=Set-9, instance=Part-1-1
 1,
*Nset, nset=Set-10, instance=Part-1-1
 4,
*Nset, nset=Set-11, instance=Part-1-1
 5,
*Nset, nset=Set-12, instance=Part-1-1
 8,
*End Assembly
**
** MATERIALS
**
*Material, name=Material-1
*Elastic
100., 0.499
**
** BOUNDARY CONDITIONS
**
** Name: BC-1 Type: Displacement/Rotation
*Boundary
Set-1, 1, 1
** Name: BC-2 Type: Displacement/Rotation
*Boundary
Set-2, 2, 2
** ----------------------------------------------------------------
**
** STEP: Step-1
**
*Step, name=Step-1, nlgeom=NO
*Static
1., 1., 1e-05, 1.
**
** LOADS
**
** Name: Load-1   Type: Concentrated force
*Cload
Set-3, 2, 0.0922852
** Name: Load-2   Type: Concentrated force
*Cload
Set-4, 2, 0.172852
** Name: Load-3   Type: Concentrated force
*Cload
Set-5, 2, 0.137696
** Name: Load-4   Type: Concentrated force
*Cload
Set-6, 2, 0.0791016
** Name: Load-5   Type: Concentrated force
*Cload
Set-7, 2, 0.0219727
** Name: Load-6   Type: Concentrated force
*Cload
Set-8, 1, 0.1875
Set-8, 2, -0.0922852
** Name: Load-7   Type: Concentrated force
*Cload
Set-9, 1, 0.75
Set-9, 2, -0.172852
** Name: Load-8   Type: Concentrated force
*Cload
Set-10, 1, 1.5
Set-10, 2, -0.137696
** Name: Load-9   Type: Concentrated force
*Cload
Set-11, 1, 2.25
Set-11, 2, -0.0791016
** Name: Load-10   Type: Concentrated force
*Cload
Set-12, 1, 1.3125
Set-12, 2, -0.0219727
**
** OUTPUT REQUESTS
**
*Restart, write, frequency=0
**
** FIELD OUTPUT: F-Output-1
**
*Output, field, variable=PRESELECT
**
** HISTORY OUTPUT: H-Output-1
**
*Output, history, variable=PRESELECT
*End Step
